<?xml version="1.0"?>

<piston_engine name="lyc_O-235">
  <minmp unit="INHG">          8.6 </minmp>
  <maxmp unit="INHG">         28.5 </maxmp>
  <displacement unit="IN3"> 233.30 </displacement>
  <maxhp>        112.00 </maxhp>
  <cycles>         4.0 </cycles>
  <cylinders>         4.0  </cylinders>
  <idlerpm>      550.0 </idlerpm>
  <maxrpm>      2700.0 </maxrpm>
  <maxthrottle>    1.0 </maxthrottle><!-- Deprecated -->
  <minthrottle>    0.1 </minthrottle><!-- Deprecated -->
  <sparkfaildrop>  0.1 </sparkfaildrop>
<!--  <starter-torque> 116.00 </starter-torque> -->
  <starter-rpm> 1600 </starter-rpm>

<!--  <volumetric-efficiency> 0.85 </volumetric-efficiency>
  <compression-ratio> 6.5 </compression-ratio> -->

<!-- Optional items that affect engine performance -->
 <!-- Defining <bsfc> over-rides the built-in horsepower calculations -->
 <!--<bsfc>           0.45 </bsfc>-->
</piston_engine>
